f := 3
λ := 30/f = 10
dx := λ/2 = 5
N := 16
L := dx*(N - 1) = 75
k := 2*π/λ
f_1(θ) := cos(θ)
i := 0 .. N - 1
X[i] := dx*i - L/2
cosec(x) := 1/sin(x)
θ_1 := 30*deg
θ_2 := 60*deg
f(θ) :=
    1/sqrt(2)*cosec(θ)/cosec(θ_1) if θ ≥ θ_1 and θ ≤ θ_2
    0 otherwise
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A(x) := k*integral(f(θ)*f_1(θ)*e^(1i*k*x*sin(θ))*1/cos(θ), θ = -π .. π)
A_0 := vectorize(A(X))
# [component: inputs A_0]
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db(x) := 20*log(|x|)
F(θ) :=
    e_1 ← e^(-1i*2*π/(λ*1)*sin(θ))
    f_1(θ)*sum(A_0[i]*e_1^X[i], i = 0 .. N - 1)
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