f_0 := 3
f_1(θ) := cos(θ)
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N := 8
λ := 30/f_0 = 10
k := 2*π/λ
dx := λ/2 = 5
L := (N - 1)*dx = 35
Θ_07 := 51/2*λ/L
2*Θ_07 = 14.5714
Δ := 0.2
n := 1
A(x) := Δ + (1 - Δ)*cos(π*x/L)^n
i := 0 .. N - 1
X[i] := i*dx - L/2
A_0 := A(X)
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F_Δ(θ) := 1/sum(A_0)*(sum(A_0[i]*f_1(θ)*e^(-1i*k*X[i]*sin(θ)), i = 0 .. N/2 - 1) - sum(A_0[i]*f_1(θ)*e^(-1i*k*X[i]*sin(θ)), i = N/2 .. N - 1))
F_Σ(θ) := 1/sum(A_0)*sum(A_0[i]*f_1(θ)*e^(-1i*k*X[i]*sin(θ)), i = 0 .. N - 1)
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r(θ) := d/dθ(Im(F_Δ(θ)))
r(0) = 4.67198
